// COMSOL Multiphysics 5.6.0.280 model "v1_600hz.mph"
// Outline of the model tree

Parameters
  L2_airway = 4.76[cm]+1[cm]  // 2nd branch height
  L3_airway = 1.90[cm]  // 3rd branch height
  d1_airway = 1.80[cm]  // 1st branch diameter
  d2_airway = 1.22[cm]  // 2nd branch diameter
  d3_airway = 0.7[cm]  // 3rd branch diameter
  L1_airway = 12[cm]  // 1st branch height
  theta = 30[deg]  // Branch degree
  r_lung = 10[cm]  // radius of lung
  L_lung = 25[cm]  // height of lung
  t_ribs = 1[cm]  // thickness of ribs
  r_ribs = 10[cm]  // inner radii of ribs
  t_fat = 2[cm]  // thickness of fat tissue
  r_fat = 10[cm]  // inner radi of fat tissue
  c_air = 343[m/s]  // speed of sound for air
  c_lung = 30[m/s]  // speed of sound for polyurethane
  c_fat = 1450[m/s]  // speed of sound for fat
  f = 400[Hz]  // excitation freq.
  d_air = (c_air/f/5)  // max. element size for air
  d_lung = ((c_lung/6)/f)  // max. element size for lung
  d_fat = (c_fat/f/6)  // max element size for fat tissue
  c_ribs = 2750[m/s]  // speed of sound for ribs
  d_ribs = (c_ribs/f/6)  // max. element size for ribs
  c_water = 1500[m/s]
  d_water = (c_water/f/6)
  theta_p = 45[deg]
  r_mon = 2.4[mm]
  P_mon_rms = 10[W]
  x_mon = 4[cm]
  y_mon = -4[cm]
  z_mon = -8[cm]
  f0 = f
  r_pocket = 3[cm]
  x_pocket = 4[cm]
  y_pocket = 4[cm]
  z_pocket = -10[cm]
  Cd = 150[dB/m]

Geometry
  geom1 "Geometry 1" (3D, length unit cm)
    cyl1: Cylinder | pos = {0, 0, -L1_airway}; r = d1_airway/2; h = L1_airway
    cyl2: Cylinder | pos = {0, -(d2_airway/2+0.1), -(L1_airway+L2_airway-1)}; r = d2_airway/2; h = L2_airway
    rot1: Rotate | input = cyl2; pos = {0, -(d2_airway/2+0.2), -L1_airway+0.2}; axistype = x; rot = -theta
    int1: Intersection | input = cyl1, rot1; keep = on
    dif3: Difference | input = rot1; input2 = int1
    cyl3: Cylinder | pos = {0, (d2_airway/2+0.1), -(L1_airway+L2_airway-1)}; r = d2_airway/2; h = L2_airway
    rot2: Rotate | input = cyl3; pos = {0, d2_airway/2+0.2, -L1_airway+0.2}; axistype = x; rot = theta
    int2: Intersection | input = cyl1, rot2; keep = on
    dif4: Difference | input = rot2; input2 = int2
    wp1: WorkPlane
      planetype = faceparallel
      quickplane = yx
      quickoffsettype = vertex
      offsetvertex = dif4(1) points 7
      quickz = -(L1_airway+L2_airway)
      face = dif4(1) boundaries 4
      quickorigin = vertexproj
      originvertex = dif4(1) points 8
      unite = on
      workplane3d = on
    cyl4: Cylinder | workplane = wp1; pos = {0, (-d3_airway/2-0.05), -0.1}; r = d3_airway/2; h = L3_airway
    rot3: Rotate | input = cyl4; workplane = wp1; axistype = x; rot = theta
    int3: Intersection | input = dif4, rot3; keep = on
    dif5: Difference | input = rot3; input2 = int3
    cyl5: Cylinder | workplane = wp1; pos = {0, -(-d3_airway/2-0.05), -0.1}; r = d3_airway/2; h = L3_airway
    rot4: Rotate | input = cyl5; workplane = wp1; axistype = x; rot = -theta
    int4: Intersection | input = dif4, rot4; keep = on
    dif6: Difference | input = rot4; input2 = int4
    wp2: WorkPlane
      planetype = faceparallel
      quickplane = yx
      quickoffsettype = vertex
      offsetvertex = dif4(1) points 7
      quickz = -(L1_airway+L2_airway)
      face = dif3(1) boundaries 3
      quickorigin = vertexproj
      originvertex = dif4(1) points 8
      unite = on
      workplane3d = on
    cyl6: Cylinder | workplane = wp2; pos = {0, (-d3_airway/2-0.05), -0.1}; r = d3_airway/2; h = L3_airway
    rot5: Rotate | input = cyl6; workplane = wp2; axistype = x; rot = theta
    int5: Intersection | input = dif3, rot5; keep = on
    dif7: Difference | input = rot5; input2 = int5
    cyl7: Cylinder | workplane = wp2; pos = {0, -(-d3_airway/2-0.05), -0.1}; r = d3_airway/2; h = L3_airway
    rot6: Rotate | input = cyl7; workplane = wp2; axistype = x; rot = -theta
    int6: Intersection | input = dif3, rot6; keep = on
    dif8: Difference | input = rot6; input2 = int6
    cyl8: Cylinder "Lung" | workplane = xyplane; pos = {0, 0, -L_lung}; r = r_lung; h = L_lung
    wp4: WorkPlane | unite = on
      c1: Circle | r = r_fat
      c2: Circle | r = r_fat+t_fat
      dif1: Difference | input = c2; input2 = c1
    ext1: Extrude | workplane = wp4; input = wp4; distance = L_lung[cm]; reverse = on
    wp5: WorkPlane | quickz = -4; unite = on
      c1: Circle | r = r_fat
      c2: Circle | r = r_fat+t_ribs
      dif1: Difference | input = c2; input2 = c1
    ext2: Extrude | workplane = wp5; input = wp5; distance = t_ribs[cm]; reverse = on
    copy1: Copy | input = ext2; keep = on; displx = 0; disply = 0; displz = range(-4,-4,-16)
    uni3: Union (disabled) | input = ext1, 
    sph1: Sphere | pos = {x_pocket, y_pocket, z_pocket}; r = r_pocket
    wp6: WorkPlane | quickz = -6; unite = on
      pt1: Point | p = {(r_fat+t_fat)*cos(theta_p), -(r_fat+t_fat)*sin(theta_p)}
      pt2: Point | p = {(r_fat+t_fat)*cos(theta_p), (r_fat+t_fat)*sin(theta_p)}
      pt3: Point | p = {-(r_fat+t_fat)*cos(theta_p), (r_fat+t_fat)*sin(theta_p)}
      pt4: Point | p = {-(r_fat+t_fat)*cos(theta_p), -(r_fat+t_fat)*sin(theta_p)}
      pt5: Point | p = {(r_fat+t_fat), 0}
      pt6: Point | p = {-(r_fat+t_fat), 0}
      pt7: Point | p = {0, (r_fat+t_fat)}
      pt8: Point | p = {0, -(r_fat+t_fat)}
    copy2: Copy | input = wp6; keep = on; displx = 0; disply = 0; displz = range(-4,-4,-12)
    pt1: Point | p = {x_mon, y_mon, z_mon}
    wp7: WorkPlane (disabled) | quickplane = yz; quickz = -6; unite = on
      pt1: Point | p = {(r_fat+t_fat)*cos(theta_p), -(r_fat+t_fat)*sin(theta_p)}
      pt2: Point | p = {(r_fat+t_fat)*cos(theta_p), (r_fat+t_fat)*sin(theta_p)}
      pt3: Point | p = {-(r_fat+t_fat)*cos(theta_p), (r_fat+t_fat)*sin(theta_p)}
      pt4: Point | p = {-(r_fat+t_fat)*cos(theta_p), -(r_fat+t_fat)*sin(theta_p)}
      pt5: Point | p = {(r_fat+t_fat), 0}
      pt6: Point | p = {-(r_fat+t_fat), 0}
      pt7: Point | p = {0, (r_fat+t_fat)}
      pt8: Point | p = {0, -(r_fat+t_fat)}
    pard1: PartitionDomains (disabled)
      domain = ext1(1) domains 1; cyl8(1) domains 1; cyl1(1) domains 1; ext2(1) domains 1; copy1(1) domains 1; copy1(2) domains 1; copy1(4) domains 1; dif4(1) domains 1; dif5(1) domains 1; dif6(1) domains 1; dif7(1) domains 1; copy1(3) domains 1; dif8(1) domains 1; dif3(1) domains 1
      workplane = wp7
    fin: Finalize "Form Union" | splitpairs = on

Materials
  mat1: Common "Air [gas]" on domains 8-14
    def "Basic"
      thermalconductivity = k(T[1/K])[W/(m*K)]
      heatcapacity = C(T[1/K])[J/(kg*K)]
      density = rho_gas_2(T[1/K])[kg/m^3]
      TD = TD(T[1/K])[m^2/s]
      dynamicviscosity = eta(T[1/K])[Pa*s]
      soundspeed = c_air
      k: Piecewise | arg = T; pieces = {70.0, 1000.0, -8.404165E-4+1.107418E-4*T^1-8.635537E-8*T^2+6.31411E-11*T^3-1.88168E-14*T^4}
      C: Piecewise
        arg = T
        pieces = 
          {100.0, 375.0, 1010.96988+0.0439478992*T^1-2.92239848E-4*T^2+6.50346734E-7*T^3}
          {375.0, 1300.0, 1093.29008-0.63555211*T^1+0.00163399216*T^2-1.41293513E-6*T^3+5.59492011E-10*T^4-8.66307242E-14*T^5}
          {1300.0, 3000.0, 701.080663+0.849386727*T^1-5.8464873E-4*T^2+2.30243637E-7*T^3-4.84675815E-11*T^4+4.2350197E-15*T^5}
      rho_gas_2: Piecewise | arg = T; pieces = {80.0, 3000.0, 352.716*T^-1}
      TD: Piecewise
        arg = T
        pieces = 
          {300.0, 753.0, 1.713214E-4-1.204913E-6*T^1+2.839046E-9*T^2-1.532799E-12*T^3}
          {753.0, 873.0, 0.00416418-1.191227E-5*T^1+8.863636E-9*T^2}
      eta: Piecewise
        arg = T
        pieces = 
          {120.0, 600.0, -1.132275E-7+7.94333E-8*T^1-7.197989E-11*T^2+5.158693E-14*T^3-1.592472E-17*T^4}
          {600.0, 2150.0, 3.892629E-6+5.75387E-8*T^1-2.675811E-11*T^2+9.709691E-15*T^3-1.355541E-18*T^4}
  mat2: Common "Polyurethane [solid]" on domains 7
    def "Basic"
      thermalconductivity = k(T[1/K])[W/(m*K)]
      density = rho(T[1/K])[kg/m^3]
      soundspeed = c_lung
      k: Piecewise | arg = T; pieces = {293.0, 368.0, 0.197+3.349E-4*T^1}
      rho: Piecewise | arg = T; pieces = {293.0, 303.0, 1250.0}
  mat3: Common "PDMS - Polydimethylsiloxane" on domains 1
    def "Basic"
      thermalexpansioncoefficient = 9e-4[1/K]
      heatcapacity = 1460[J/(kg*K)]
      relpermittivity = 2.75
      density = 970[kg/m^3]
      thermalconductivity = 0.16[W/(m*K)]
      soundspeed = c_fat
    Enu "Young's modulus and Poisson's ratio"
      youngsmodulus = 750[kPa]
      poissonsratio = 0.49
  mat4: Common "PMMA [solid]" on domains 2-6
    def "Basic"
      thermalconductivity = k(T[1/K])[W/(m*K)]
      thermalexpansioncoefficient = (alpha(T[1/K])[1/K]+(Tempref-293[K])*if(abs(T-Tempref)>1e-3,(alpha(T[1/K])[1/K]-alpha(Tempref[1/K])[1/K])/(T-Tempref),d(alpha(T[1/K])[1/K],T)))/(1+alpha(Tempref[1/K])[1/K]*(Tempref-293[K]))
      density = rho(T[1/K])[kg/m^3]
      TD = TD(T[1/K])[m^2/s]
      soundspeed = c_ribs
      k: Piecewise | arg = T; pieces = {293.0, 352.0, 0.1510983+1.344534E-4*T^1}
      alpha: Piecewise | arg = T; pieces = {293.0, 323.0, 5.840372E-5-4.831146E-7*T^1+1.757514E-9*T^2}
      rho: Piecewise | arg = T; pieces = {293.0, 323.0, 1082.529+0.974361*T^1-0.002073609*T^2}
      TD: Piecewise
        arg = T
        pieces = 
          {87.0, 308.0, 2.552466E-7-5.175922E-10*T^1+2.95724E-13*T^2}
          {308.0, 460.0, -7.896105E-6+8.38529E-8*T^1-3.249648E-10*T^2+5.518894E-13*T^3-3.476433E-16*T^4}
    ThermalExpansion
      dL = (dL(T[1/K])-dL(Tempref[1/K]))/(1+dL(Tempref[1/K]))
      dL: Piecewise | arg = T; pieces = {293.0, 323.0, 0.031294866-2.81029E-4*T^1+5.946095E-7*T^2}
    Enu "Young's modulus and Poisson's ratio"
      youngsmodulus = E(T[1/K])[Pa]
      poissonsratio = nu(T[1/K])
      E: Piecewise
        arg = T
        pieces = 
          {68.0, 125.0, 7.3846E9}
          {125.0, 400.0, 4.31023E9+6.934433E7*T^1-528212.9*T^2+1579.615*T^3-1.742098*T^4}
      nu: Piecewise
        arg = T
        pieces = 
          {68.0, 124.0, 0.34502}
          {124.0, 270.0, 0.6787961-0.006076254*T^1+3.893231E-5*T^2-1.066899E-7*T^3+1.037697E-10*T^4}
          {270.0, 400.0, 6.00413-0.07428949*T^1+3.664807E-4*T^2-8.064015E-7*T^3+6.657131E-10*T^4}
    KG "Bulk modulus and shear modulus"
      K = kappa(T[1/K])[Pa]
      G = mu(T[1/K])[Pa]
      mu: Piecewise
        arg = T
        pieces = 
          {68.0, 125.0, 2.7459E9}
          {125.0, 400.0, 8.498712E8+3.971458E7*T^1-287911.7*T^2+846.344*T^3-0.9122308*T^4}
      kappa: Piecewise
        arg = T
        pieces = 
          {68.0, 124.0, 7.923015E9}
          {124.0, 400.0, 2.054283E10-2.194785E8*T^1+1354634.0*T^2-3721.425*T^3+3.647352*T^4}
  mat8: Common "Air [gas] 1" on no domains
    def "Basic"
      thermalconductivity = k(T[1/K])[W/(m*K)]
      heatcapacity = C(T[1/K])[J/(kg*K)]
      density = rho_gas_2(T[1/K])[kg/m^3]
      TD = TD(T[1/K])[m^2/s]
      dynamicviscosity = eta(T[1/K])[Pa*s]
      soundspeed = 343
      k: Piecewise | arg = T; pieces = {70.0, 1000.0, -8.404165E-4+1.107418E-4*T^1-8.635537E-8*T^2+6.31411E-11*T^3-1.88168E-14*T^4}
      C: Piecewise
        arg = T
        pieces = 
          {100.0, 375.0, 1010.97+0.0439479*T^1-2.922398E-4*T^2+6.503467E-7*T^3}
          {375.0, 1300.0, 1093.29-0.6355521*T^1+0.001633992*T^2-1.412935E-6*T^3+5.59492E-10*T^4-8.663072E-14*T^5}
          {1300.0, 3000.0, 701.0807+0.8493867*T^1-5.846487E-4*T^2+2.302436E-7*T^3-4.846758E-11*T^4+4.23502E-15*T^5}
      rho_gas_2: Piecewise "Piecewise 2a" | arg = T; pieces = {80.0, 3000.0, 352.716*T^-1}
      TD: Piecewise
        arg = T
        pieces = 
          {300.0, 753.0, 1.713214E-4-1.204913E-6*T^1+2.839046E-9*T^2-1.532799E-12*T^3}
          {753.0, 873.0, 0.00416418-1.191227E-5*T^1+8.863636E-9*T^2}
      eta: Piecewise
        arg = T
        pieces = 
          {120.0, 600.0, -1.132275E-7+7.94333E-8*T^1-7.197989E-11*T^2+5.158693E-14*T^3-1.592472E-17*T^4}
          {600.0, 2150.0, 3.892629E-6+5.75387E-8*T^1-2.675811E-11*T^2+9.709691E-15*T^3-1.355541E-18*T^4}
  mat9: Common "H2O (water) [liquid]" on domains 15
    def "Basic"
      thermalconductivity = k_liquid_2(T[1/K])[W/(m*K)]
      thermalexpansioncoefficient = (alpha_liquid_2(T[1/K])[1/K]+(Tempref-293[K])*if(abs(T-Tempref)>1e-3,(alpha_liquid_2(T[1/K])[1/K]-alpha_liquid_2(Tempref[1/K])[1/K])/(T-Tempref),d(alpha_liquid_2(T[1/K])[1/K],T)))/(1+alpha_liquid_2(Tempref[1/K])[1/K]*(Tempref-293[K]))
      heatcapacity = C_liquid_2(T[1/K])[J/(kg*K)]
      HC = HC_liquid_2(T[1/K])[J/(mol*K)]
      VP = VP_liquid_2(T[1/K])[Pa]
      density = rho_liquid_2(T[1/K])[kg/m^3]
      TD = TD_liquid_2(T[1/K])[m^2/s]
      dynamicviscosity = eta_liquid_1(T[1/K])[Pa*s]
      SurfF = SurfF(T[1/K])[N/m]
      soundspeed = 1500
      k_liquid_2: Piecewise | arg = T; pieces = {275.0, 370.0, -0.9003748+0.008387698*T^1-1.118205E-5*T^2}
      alpha_liquid_2: Piecewise
        arg = T
        pieces = 
          {273.0, 283.0, 0.01032507-7.62815E-5*T^1+1.412474E-7*T^2}
          {283.0, 373.0, -0.002464185+1.947611E-5*T^1-5.049672E-8*T^2+4.616995E-11*T^3}
      C_liquid_2: Piecewise | arg = T; pieces = {293.0, 373.0, 4035.84079+0.492312034*T^1}
      HC_liquid_2: Piecewise | arg = T; pieces = {293.0, 373.0, 72.6451184+0.00886161577*T^1}
      VP_liquid_2: Piecewise | arg = T; pieces = {280.0, 600.0, (exp((-2.00512183e+03/T-5.56570000e-01*log10(T)+9.89879000e+00-1.11169009e+07/T^3)*log(10.0)))*1.33320000e+02}
      rho_liquid_2: Piecewise
        arg = T
        pieces = 
          {273.0, 283.0, 972.7584+0.2084*T^1-4.0E-4*T^2}
          {283.0, 373.0, 345.28+5.749816*T^1-0.0157244*T^2+1.264375E-5*T^3}
      TD_liquid_2: Piecewise | arg = T; pieces = {273.0, 333.0, 8.04E-8+2.0E-10*T^1}
      eta_liquid_1: Piecewise
        arg = T
        pieces = 
          {265.0, 293.0, 5.948859-0.08236196*T^1+4.287142E-4*T^2-9.938045E-7*T^3+8.65316E-10*T^4}
          {293.0, 353.0, 0.410191-0.004753985*T^1+2.079795E-5*T^2-4.061698E-8*T^3+2.983925E-11*T^4}
          {353.0, 423.0, 0.03625638-3.265463E-4*T^1+1.127139E-6*T^2-1.75363E-9*T^3+1.033976E-12*T^4}
      SurfF: Piecewise
        arg = T
        pieces = 
          {274.0, 568.0, 0.07739832+2.071003E-4*T^1-1.23147E-6*T^2+2.344068E-9*T^3-3.033107E-12*T^4+1.758716E-15*T^5}
          {568.0, 647.0, -109.3735+0.9291756*T^1-0.003154159*T^2+5.351438E-6*T^3-4.539449E-9*T^4+1.540327E-12*T^5}
    ThermalExpansion
      alphatan = CTE_liquid_2(T[1/K])[1/K]
      dL = (dL_liquid_2(T[1/K])-dL_liquid_2(Tempref[1/K]))/(1+dL_liquid_2(Tempref[1/K]))
      dL_liquid_2: Piecewise
        arg = T
        pieces = 
          {273.0, 283.0, 0.008486158-6.947021E-5*T^1+1.333373E-7*T^2}
          {283.0, 373.0, 0.232446637-0.002030447*T^1+5.510259E-6*T^2-4.395999E-9*T^3}
      CTE_liquid_2: Piecewise
        arg = T
        pieces = 
          {273.0, 283.0, -6.947321E-5+2.666746E-7*T^1}
          {283.0, 293.0, -0.01363715+8.893977E-5*T^1-1.43925E-7*T^2}
          {293.0, 373.0, -0.00203045+1.102052E-5*T^1-1.3188E-8*T^2}

Physics
  acpr: PressureAcoustics "Pressure Acoustics, Frequency Domain" on domains 7-15
    dependent variable p
    fpam1: FrequencyPressureAcousticsModel "Pressure Acoustics 1" (default)
    shb1: SoundHard "Sound Hard Boundary (Wall) 1" (default)
    init1: init "Initial Values 1" (default)
    imp1: Impedance on boundaries 1-4, 27, 48, 52, 83, 136
    fpam2: FrequencyPressureAcousticsModel "Pressure Acoustics 2" on domains 7
      FluidModel = Attenuation
      alpha2 = Cd
      AttenuationType = dBperm
    mps1: FrequencyMonopolePointSource "Monopole Point Source 1" (disabled) on points 162
      P_rms = P_mon_rms
      Type = Power
    pr1: Pressure on boundaries 52 | p0 = 1
  pabe: PressureAcousticsBoundaryElements (disabled) on domains 7
    dependent variable p2
    bpam1: BoundaryElementsPressureAcousticsModel "Pressure Acoustics 1" (default)
      FluidModel = Attenuation
      alpha2 = 150
      AttenuationType = dBperm
    shb1: SoundHard "Sound Hard Boundary (Wall) 1" (default)
    init1: init2 "Initial Values 1" (default)
    imp1: Impedance on boundaries 25-48, 89-99, 120-130
  solid: SolidMechanics on domains 1-6
    dependent variable u = {u, v, w}
    lemm1: LinearElasticModel "Linear Elastic Material 1" (default)
    free1: Free (default)
    init1: init "Initial Values 1" (default)
    fix1: Fixed "Fixed Constraint 1" (disabled) on no boundaries

Multiphysics
  asb1: AcousticStructureBoundary on all boundaries | Acoustics_physics = acpr; Structure_physics = solid
  aab1: AcousticAcousticBoundary "Acoustic BEM-FEM Boundary 1" (disabled) on all boundaries
    BEMAcoustics_physics = pabe
    FEMAcoustics_physics = acpr
  asb2: AcousticStructureBoundary (disabled) on all boundaries | Acoustics_physics = pabe; Structure_physics = solid

Mesh
  mesh3 "Mesh 3"
    size: MeshSizeDefault | hauto = 3
    ftet1: FreeTet "Mesh_air" on domains 8-15
      size1: Size on domains 8-15 | hmax = d_air; hauto = 3; custom = on
    ftet2: FreeTet "Mesh_lung" on domains 7
      size1: Size on domains 7 | hmax = d_lung; hauto = 4; custom = on
    ftet5: FreeTet "Free Tetrahedral 5" on domains 1-6
      size2: Size on domains 1-6 | hmax = 1.38; hauto = 3

Studies
  std1 "Study 1"
    freq: Frequency "Frequency Domain" | plist = f; mesh = {geom1, mesh3}

Solver configurations
  sol1 "Solution 1" (study std1)
    v1: Variables "Dependent Variables 1"
    s1: Stationary "Stationary Solver 1"
      p1: Parametric | pname = freq; plistarr = f; punit = Hz; pcontinuationmode = no
      fc1: FullyCoupled | linsolver = d1
      d1: Direct "Suggested Direct Solver (asb1) (merged)"

Datasets
  dset1: Solution | solution = sol1
  grid1: Grid3D
    source = data
    data = dset1
    parmin1 = -14
    parmax1 = 14
    parmin2 = -14
    parmax2 = 14
    parmin3 = -25
    parmax3 = 0
  surf1: Surface on boundaries 2, 136 | data = dset1
  surf2: Surface on boundaries 1, 2, 83, 136 | data = dset1
  surf3: Surface on boundaries 83, 136 | data = dset1
  cpl1: CutPlane | data = dset1
  surf4: Surface on boundaries 83-88, 131-136 | data = dset1

Derived values
  pev1: EvalPoint "Point Evaluation 1" on points 2-5, 29-36, 58-61, 136-139, 168-175, 199-202
    data = dset1
    table = tbl1
    expr = sqrt((solid.u_tX)^2+(solid.u_tY)^2)

Tables
  tbl1: Table
    // Point Evaluation 1
    freq (Hz) | sqrt((solid.u_tX)^2+(solid.u_tY)^2) (m/s), Point: 2 | sqrt((solid.u_tX)^2+(solid.u_tY)^2) (m/s), Point: 3 | sqrt((solid.u_tX)^2+(solid.u_tY)^2) (m/s), Point: 4 | sqrt((solid.u_tX)^2+(solid.u_tY)^2) (m/s), Point: 5 | sqrt((solid.u_tX)^2+(solid.u_tY)^2) (m/s), Point: 29 | sqrt((solid.u_tX)^2+(solid.u_tY)^2) (m/s), Point: 30 | sqrt((solid.u_tX)^2+(solid.u_tY)^2) (m/s), Point: 31 | sqrt((solid.u_tX)^2+(solid.u_tY)^2) (m/s), Point: 32 | sqrt((solid.u_tX)^2+(solid.u_tY)^2) (m/s), Point: 33 | sqrt((solid.u_tX)^2+(solid.u_tY)^2) (m/s), Point: 34 | sqrt((solid.u_tX)^2+(solid.u_tY)^2) (m/s), Point: 35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
    600 | 0.00183067+0.0120989i | 0.00106099+0.0120519i | 0.00872276-0.00604684i | 0.00380158-0.0161232i | 0.00582685+0.011152i | 0.00938178-0.00983186i | 0.000766733+0.00766432i | 0.00995936-0.00617572i | 0.0108635-0.0113222i | 0.0137682-0.00878316i | 0.00150988+0.00471351i